** written by FreeCAD inp file writer for CalculiX,Abaqus meshes
** highest dimension mesh elements only.

** Nodes
*Node, NSET=Nall
1, 0, 1.5, 0
2, 0, 1.5, 0.5
3, 0, 1.125, 0.5
4, 0, 1.125, 0
5, 0.25, 1.5, 0
6, 0.25, 1.5, 0.5
7, 0.25, 1.125, 0.5
8, 0.25, 1.125, 0
9, 0, 1.5, 1
10, 0, 1.125, 1
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

** Volume elements
*Element, TYPE=C3D8, ELSET=Evolumes
1, 3, 4, 1, 2, 7, 8, 5, 6
2, 10, 3, 2, 9, 12, 7, 6, 11
3, 14, 10, 9, 13, 16, 12, 11, 15
4, 18, 14, 13, 17, 20, 16, 15, 19
5, 22, 18, 17, 21, 24, 20, 19, 23
6, 26, 22, 21, 25, 28, 24, 23, 27
7, 30, 26, 25, 29, 32, 28, 27, 31
8, 34, 30, 29, 33, 36, 32, 31, 35
9, 38, 34, 33, 37, 40, 36, 35, 39
10, 42, 38, 37, 41, 44, 40, 39, 43
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
** Define element set Eall
*ELSET, ELSET=Eall
Evolumes


***********************************************************
** Element sets for materials and FEM element type (solid, shell, beam, fluid)
** written by write_element_sets_material_and_femelement_type function
*ELSET,ELSET=MechanicalMaterialSolid
Evolumes

***********************************************************
** constraints fixed node sets
** written by write_node_sets_constraints_fixed function
** FemConstraintDisplacement
*NSET,NSET=FemConstraintDisplacement
1,
4,
5,
8,
69,
72,
103,
106,
137,
140,
172,
174,
206,
223,
240,
257,
259,
291,
308,
325,
342,
344,
376,
393,
410,

***********************************************************
** Materials
** written by write_materials function
** Young's modulus unit is MPa = N/mm2
** FreeCAD material name: CalculiX-Steel
** MechanicalMaterial
*MATERIAL, NAME=MechanicalMaterial
*ELASTIC
210000, 0.300

***********************************************************
** Sections
** written by write_femelementsets function
*SOLID SECTION, ELSET=MechanicalMaterialSolid, MATERIAL=MechanicalMaterial

***********************************************************
** At least one step is needed to run an CalculiX analysis of FreeCAD
** written by write_step_begin function
*STEP
*BUCKLE
10


***********************************************************
** Fixed Constraints
** written by write_constraints_fixed function
** FemConstraintDisplacement
*BOUNDARY
FemConstraintDisplacement,1
FemConstraintDisplacement,2
FemConstraintDisplacement,3


***********************************************************
** constraints force node loads
** written by write_constraints_force function
*CLOAD
** FemConstraintForce
** node loads on shape: beam:Face6
65,3,-3.2812500000000E-01
66,3,-6.5625000000000E-01
67,3,-6.5625000000000E-01
68,3,-1.3125000000000E+00
101,3,-6.5625000000000E-01
102,3,-1.3125000000000E+00
135,3,-6.5625000000000E-01
136,3,-1.3125000000000E+00
169,3,-3.2812500000000E-01
170,3,-6.5625000000000E-01
203,3,-6.5625000000000E-01
204,3,-1.3125000000000E+00
221,3,-1.3125000000000E+00
238,3,-1.3125000000000E+00
255,3,-6.5625000000000E-01
288,3,-6.5625000000000E-01
289,3,-1.3125000000000E+00
306,3,-1.3125000000000E+00
323,3,-1.3125000000000E+00
340,3,-6.5625000000000E-01
373,3,-3.2812500000000E-01
374,3,-6.5625000000000E-01
391,3,-6.5625000000000E-01
408,3,-6.5625000000000E-01
425,3,-3.2812500000000E-01


***********************************************************
** Outputs --> frd file
** written by write_outputs_types function
*NODE FILE
U
*EL FILE
S, E
** outputs --> dat file
** reaction forces for Constraint fixed
*NODE PRINT, NSET=FemConstraintDisplacement, TOTALS=ONLY
RF


***********************************************************
** written by write_step_end function
*END STEP

***********************************************************
** CalculiX Input file
** written by write_footer function
**   written by    --> FreeCAD 0.19.23856 (Git)
**   written on    --> Tue Mar 30 10:47:39 2021
**   file name     -->
**   analysis name --> Analysis
**
**
***********************************************************
**  About units:
**  See ccx manual, ccx does not know about any unit.
**  Golden rule: The user must make sure that the numbers he provides have consistent units.
**  The user is the FreeCAD calculix writer module ;-)
**
**  The unit system which is used at Guido Dhondt's company: mm, N, s, K
**  Since Length and Mass are connected by Force, if Length is mm the Mass is in t to get N
**  The following units are used to write to inp file:
**
**  Length: mm (this includes the mesh geometry)
**  Mass: t
**  TimeSpan: s
**  Temperature: K
**
**  This leads to:
**  Force: N
**  Pressure: N/mm^2
**  Density: t/mm^3
**  Gravity: mm/s^2
**  Thermal conductivity: t*mm/K/s^3 (same as W/m/K)
**  Specific Heat: mm^2/s^2/K (same as J/kg/K)
**
