** written by FreeCAD inp file writer for CalculiX,Abaqus meshes
** highest dimension mesh elements only.

** Nodes
*Node, NSET=Nall
1, 0, 500, 0
2, 0, 500, 1000
3, 8000, 500, 0
4, 8000, 500, 1000
5, 0, 500, 142.8571428571
6, 0, 500, 285.7142857143
7, 0, 500, 428.5714285714
8, 0, 500, 571.4285714286
9, 0, 500, 714.2857142857
10, 0, 500, 857.1428571429
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

** Face elements
*Element, TYPE=S3, ELSET=Efaces
123, 220, 445, 409
124, 408, 447, 217
125, 128, 285, 210
126, 211, 286, 125
127, 209, 284, 126
128, 132, 283, 212
129, 206, 340, 167
130, 166, 345, 207
131, 220, 409, 323
132, 324, 408, 217
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
** Define element set Eall
*ELSET, ELSET=Eall
Efaces


***********************************************************
** Element sets for materials and FEM element type (solid, shell, beam, fluid)
*ELSET,ELSET=MechanicalMaterialThickness
Efaces

***********************************************************
** constraints fixed node sets
** ConstraintFixed
*NSET,NSET=ConstraintFixed
1,
2,
5,
6,
7,
8,
9,
10,

***********************************************************
** Materials
** see information about units at file end
** FreeCAD material name: Calculix-Steel
** MechanicalMaterial
*MATERIAL, NAME=MechanicalMaterial
*ELASTIC
210000,0.3

***********************************************************
** Sections
*SHELL SECTION, ELSET=MechanicalMaterialThickness, MATERIAL=MechanicalMaterial
1000

***********************************************************
** At least one step is needed to run an CalculiX analysis of FreeCAD
*STEP
*STATIC


***********************************************************
** Fixed Constraints
** ConstraintFixed
*BOUNDARY
ConstraintFixed,1
ConstraintFixed,2
ConstraintFixed,3
ConstraintFixed,4
ConstraintFixed,5
ConstraintFixed,6


***********************************************************
** constraints force node loads
*CLOAD
** ConstraintForce
** node loads on shape: CanileverPlate:Edge3
3,2,-1.4274296030895E-10
3,3,-6.4285714285714E+05
4,2,-1.4274296030895E-10
4,3,-6.4285714285715E+05
64,2,-2.8548592061790E-10
64,3,-1.2857142857143E+06
65,2,-2.8548592061790E-10
65,3,-1.2857142857143E+06
66,2,-2.8548592061790E-10
66,3,-1.2857142857143E+06
67,2,-2.8548592061790E-10
67,3,-1.2857142857143E+06
68,2,-2.8548592061790E-10
68,3,-1.2857142857143E+06
69,2,-2.8548592061790E-10
69,3,-1.2857142857143E+06


***********************************************************
** Outputs --> frd file
*NODE FILE, OUTPUT=2d
U
*EL FILE
S, E
** outputs --> dat file
** reaction forces for Constraint fixed
*NODE PRINT, NSET=ConstraintFixed, TOTALS=ONLY
RF


***********************************************************
*END STEP

***********************************************************
** CalculiX Input file
**   written by    --> FreeCAD 0.20.25335 (Git)
**   written on    --> Wed Jul 28 16:57:44 2021
**   file name     --> test.FCStd
**   analysis name --> Analysis
**
**
***********************************************************
**  About units:
**  See ccx manual, ccx does not know about any unit.
**  Golden rule: The user must make sure that the numbers he provides have consistent units.
**  The user is the FreeCAD calculix writer module ;-)
**
**  The unit system which is used at Guido Dhondt's company: mm, N, s, K
**  Since Length and Mass are connected by Force, if Length is mm the Mass is in t to get N
**  The following units are used to write to inp file:
**
**  Length: mm (this includes the mesh geometry)
**  Mass: t
**  TimeSpan: s
**  Temperature: K
**
**  This leads to:
**  Force: N
**  Pressure: N/mm^2 == MPa (Young's Modulus has unit Pressure)
**  Density: t/mm^3
**  Gravity: mm/s^2
**  Thermal conductivity: t*mm/K/s^3 == as W/m/K == kW/mm/K
**  Specific Heat: mm^2/s^2/K = J/kg/K == kJ/t/K
**
