** written by FreeCAD inp file writer for CalculiX,Abaqus meshes
** highest dimension mesh elements only.

** Nodes
*Node, NSET=Nall
1, -2.22e-13, 0, 1000
2, 4.460492503132e-17, 0, 0
3, 4.460492503132e-17, 1000, 0
4, -2.22e-13, 1000, 1000
5, 8000, 0, 1000
6, 8000, 0, 1.818989403546e-12
7, 8000, 1000, 1.818989403546e-12
8, 8000, 1000, 1000
9, -1.664888487687e-13, 0, 750
10, -1.109776975375e-13, 0, 500
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

** Volume elements
*Element, TYPE=C3D20, ELSET=Evolumes
1, 1, 10, 95, 19, 61, 105, 222, 192, 9, 93, 94, 20, 104, 220, 221,
193, 62, 103, 219, 190,
2, 10, 2, 13, 95, 105, 34, 134, 222, 11, 12, 96, 93, 106, 133, 223,
220, 103, 33, 132, 219,
3, 19, 95, 16, 4, 192, 222, 163, 79, 94, 97, 17, 18, 221, 224, 164,
191, 190, 219, 161, 78,
4, 95, 13, 3, 16, 222, 134, 64, 163, 96, 14, 15, 97, 223, 135, 162,
224, 219, 132, 63, 161,
5, 61, 105, 222, 192, 59, 109, 228, 196, 104, 220, 221, 193, 108, 226, 227,
197, 60, 107, 225, 194,
6, 105, 34, 134, 222, 109, 36, 138, 228, 106, 133, 223, 220, 110, 137, 229,
226, 107, 35, 136, 225,
7, 192, 222, 163, 79, 196, 228, 167, 81, 221, 224, 164, 191, 227, 230, 168,
195, 194, 225, 165, 80,
8, 222, 134, 64, 163, 228, 138, 66, 167, 223, 135, 162, 224, 229, 139, 166,
230, 225, 136, 65, 165,
9, 59, 109, 228, 196, 57, 113, 234, 200, 108, 226, 227, 197, 112, 232, 233,
201, 58, 111, 231, 198,
10, 109, 36, 138, 228, 113, 38, 142, 234, 110, 137, 229, 226, 114, 141, 235,
232, 111, 37, 140, 231,
11, 196, 228, 167, 81, 200, 234, 171, 83, 227, 230, 168, 195, 233, 236, 172,
199, 198, 231, 169, 82,
12, 228, 138, 66, 167, 234, 142, 68, 171, 229, 139, 166, 230, 235, 143, 170,
236, 231, 140, 67, 169,
13, 57, 113, 234, 200, 55, 117, 240, 204, 112, 232, 233, 201, 116, 238, 239,
205, 56, 115, 237, 202,
14, 113, 38, 142, 234, 117, 40, 146, 240, 114, 141, 235, 232, 118, 145, 241,
238, 115, 39, 144, 237,
15, 200, 234, 171, 83, 204, 240, 175, 85, 233, 236, 172, 199, 239, 242, 176,
203, 202, 237, 173, 84,
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
** Define element set Eall
*ELSET, ELSET=Eall
Evolumes


***********************************************************
** Element sets for materials and FEM element type (solid, shell, beam, fluid)
** written by write_element_sets_material_and_femelement_type function
*ELSET,ELSET=FemMaterialSolid
Evolumes

***********************************************************
** constraints fixed node sets
** written by write_node_sets_constraints_fixed function
** ConstraintFixed
*NSET,NSET=ConstraintFixed
1,
2,
3,
4,
9,
10,
11,
12,
13,
14,
15,
16,
17,
18,
19,
20,
93,
94,
95,
96,
97,

***********************************************************
** Materials
** written by write_materials function
** Young's modulus unit is MPa = N/mm2
** FreeCAD material name: CalculiX-Steel
** FemMaterial
*MATERIAL, NAME=FemMaterial
*ELASTIC
210000, 0.300

***********************************************************
** Sections
** written by write_femelementsets function
*SOLID SECTION, ELSET=FemMaterialSolid, MATERIAL=FemMaterial

***********************************************************
** At least one step is needed to run an CalculiX analysis of FreeCAD
** written by write_step_begin function
*STEP
*STATIC


***********************************************************
** Fixed Constraints
** written by write_constraints_fixed function
** ConstraintFixed
*BOUNDARY
ConstraintFixed,1
ConstraintFixed,2
ConstraintFixed,3


***********************************************************
** constraints force node loads
** written by write_constraints_force function
*CLOAD
** ConstraintForce
** node loads on shape: Box:Face2
5,3,1.8750000000000E+05
6,3,1.8750000000000E+05
7,3,1.8750000000000E+05
8,3,1.8750000000000E+05
21,3,-7.5000000000000E+05
22,3,3.7500000000000E+05
23,3,-7.5000000000000E+05
24,3,-7.5000000000000E+05
25,3,3.7500000000000E+05
26,3,-7.5000000000000E+05
27,3,-7.5000000000000E+05
28,3,3.7500000000000E+05
29,3,-7.5000000000000E+05
30,3,-7.5000000000000E+05
31,3,3.7500000000000E+05
32,3,-7.5000000000000E+05
98,3,-1.5000000000000E+06
99,3,-1.5000000000000E+06
100,3,7.5000000000000E+05
101,3,-1.5000000000000E+06
102,3,-1.5000000000000E+06


***********************************************************
** Outputs --> frd file
** written by write_outputs_types function
*NODE FILE
U
*EL FILE
S, E
** outputs --> dat file
** reaction forces for Constraint fixed
*NODE PRINT, NSET=ConstraintFixed, TOTALS=ONLY
RF


***********************************************************
** written by write_step_end function
*END STEP

***********************************************************
** CalculiX Input file
** written by write_footer function
**   written by    --> FreeCAD 0.19.19767 (Git)
**   written on    --> Sun Mar  1 22:34:34 2020
**   file name     --> CantilverHexa20FaceLoad.FCStd
**   analysis name --> Analysis
**
**
***********************************************************
**  About units:
**  See ccx manual, ccx does not know about any unit.
**  Golden rule: The user must make sure that the numbers he provides have consistent units.
**  The user is the FreeCAD calculix writer module ;-)
**
**  The unit system which is used at Guido Dhondt's company: mm, N, s, K
**  Since Length and Mass are connected by Force, if Length is mm the Mass is in t to get N
**  The following units are used to write to inp file:
**
**  Length: mm (this includes the mesh geometry)
**  Mass: t
**  TimeSpan: s
**  Temperature: K
**
**  This leads to:
**  Force: N
**  Pressure: N/mm^2
**  Density: t/mm^3
**  Gravity: mm/s^2
**  Thermal conductivity: t*mm/K/s^3 (same as W/m/K)
**  Specific Heat: mm^2/s^2/K (same as J/kg/K)
**
