** written by FreeCAD inp file writer for CalculiX,Abaqus meshes
** highest dimension mesh elements only.

** Nodes
*Node, NSET=Nall
1, 286, 25, -247
2, 286, 25, 253
3, 286, 0, -247
4, 286, 0, 253
5, 186, 25, -247
6, 186, 25, 253
7, 186, 0, -247
8, 186, 0, 253
9, 6.661338147751e-15, -42, -30
10, -6.661338147751e-15, -42, 30
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

** Volume elements
*Element, TYPE=C3D10, ELSET=Evolumes
1281, 32, 67, 33, 180, 1159, 1160, 587, 777, 2218, 778
1282, 23, 171, 57, 24, 752, 2219, 1173, 578, 753, 1141
1283, 270, 237, 211, 269, 1122, 2220, 2221, 1136, 1131, 2222
1284, 180, 220, 264, 256, 933, 2223, 2225, 2226, 2224, 1075
1285, 184, 230, 271, 216, 2227, 1112, 2229, 894, 2228, 2230
1286, 241, 265, 240, 201, 1080, 1079, 997, 2232, 2231, 2233
1287, 188, 56, 205, 249, 824, 846, 855, 2235, 2234, 2236
1288, 268, 215, 216, 183, 2237, 895, 2238, 2239, 892, 893
1289, 83, 241, 82, 48, 996, 995, 640, 1192, 2240, 1190
1290, 195, 243, 266, 244, 2241, 1085, 2242, 2243, 1006, 1086
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
** Define element set Eall
*ELSET, ELSET=Eall
Evolumes


***********************************************************
** Element sets for materials and FEM element type (solid, shell, beam, fluid)
** written by write_element_sets_material_and_femelement_type function
*ELSET,ELSET=MechanicalMaterialSolid
Evolumes

***********************************************************
** constraints fixed node sets
** written by write_node_sets_constraints_fixed function
** ConstraintFixed
*NSET,NSET=ConstraintFixed
1,
2,
3,
4,
5,
6,
7,
8,
9,
10,
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
***********************************************************
** constraints contact surface sets
** written by write_surfaces_constraints_contact function
** ConstraintContact
*SURFACE, NAME=DEPConstraintContact
1344,S4
1655,S1
1703,S3
1704,S4
1728,S3
1729,S4
1732,S3
1733,S1
1734,S3
1736,S4
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*SURFACE, NAME=INDConstraintContact
1283,S2
1286,S1
1289,S1
1290,S3
1292,S1
1294,S3
1295,S2
1298,S2
1300,S3
1303,S3
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
***********************************************************
** Materials
** written by write_materials function
** Young's modulus unit is MPa = N/mm2
** FreeCAD material name: Steel-Generic
** MechanicalMaterial
*MATERIAL, NAME=MechanicalMaterial
*ELASTIC
200000, 0.300

***********************************************************
** Sections
** written by write_femelementsets function
*SOLID SECTION, ELSET=MechanicalMaterialSolid, MATERIAL=MechanicalMaterial

***********************************************************
** Contact Constraints
** written by write_constraints_contact function
** ConstraintContact
*CONTACT PAIR, INTERACTION=INTConstraintContact,TYPE=SURFACE TO SURFACE
DEPConstraintContact,INDConstraintContact
*SURFACE INTERACTION, NAME=INTConstraintContact
*SURFACE BEHAVIOR,PRESSURE-OVERCLOSURE=LINEAR
1000000.0

***********************************************************
** At least one step is needed to run an CalculiX analysis of FreeCAD
** written by write_step_begin function
*STEP
*STATIC


***********************************************************
** Fixed Constraints
** written by write_constraints_fixed function
** ConstraintFixed
*BOUNDARY
ConstraintFixed,1
ConstraintFixed,2
ConstraintFixed,3


***********************************************************
** constraints pressure element face loads
** written by write_constraints_pressure function
** ConstraintPressure
*DLOAD
** ConstraintPressure: face load
1322,P2,100.0
1516,P1,100.0
1701,P1,100.0
1727,P1,100.0
1728,P1,100.0
1729,P1,100.0
1733,P3,100.0
1745,P2,100.0
1746,P3,100.0
1751,P3,100.0
1754,P2,100.0
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
***********************************************************
** Outputs --> frd file
** written by write_outputs_types function
*NODE FILE
U
*EL FILE
S, E
** outputs --> dat file
** reaction forces for Constraint fixed
*NODE PRINT, NSET=ConstraintFixed, TOTALS=ONLY
RF


***********************************************************
** written by write_step_end function
*END STEP

***********************************************************
** CalculiX Input file
** written by write_footer function
**   written by    --> FreeCAD 0.19.19463 (Git)
**   written on    --> Mon Feb  3 23:28:02 2020
**   file name     -->
**   analysis name --> Analysis
**
**
***********************************************************
**  About units:
**  See ccx manual, ccx does not know about any unit.
**  Golden rule: The user must make sure that the numbers he provides have consistent units.
**  The user is the FreeCAD calculix writer module ;-)
**
**  The unit system which is used at Guido Dhondt's company: mm, N, s, K
**  Since Length and Mass are connected by Force, if Length is mm the Mass is in t to get N
**  The following units are used to write to inp file:
**
**  Length: mm (this includes the mesh geometry)
**  Mass: t
**  TimeSpan: s
**  Temperature: K
**
**  This leads to:
**  Force: N
**  Pressure: N/mm^2
**  Density: t/mm^3
**  Gravity: mm/s^2
**  Thermal conductivity: t*mm/K/s^3 (same as W/m/K)
**  Specific Heat: mm^2/s^2/K (same as J/kg/K)
**
