** written by FreeCAD inp file writer for CalculiX,Abaqus meshes
** highest dimension mesh elements only.

** Nodes
*Node, NSET=Nall
1, 67, -1.776356838198e-15, -15
2, 67, -1.776356838198e-15, 15
3, 47, 0, -15
4, 47, 0, 15
5, 42.69003028349, 41.23803861626, -15
6, 42.69003028349, 41.23803861626, 15
7, 34.63800439591, 31.76804450181, -15
8, 34.63800439591, 31.76804450181, 15
9, -105, 5.329070518201e-15, -15
10, -105, 5.329070518201e-15, 15
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

** Volume elements
*Element, TYPE=C3D10, ELSET=Evolumes
807, 329, 326, 230, 406, 348, 1370, 1371, 1373, 1372, 1374
808, 327, 324, 259, 264, 372, 1375, 1376, 1378, 1377, 316
809, 328, 331, 59, 437, 359, 357, 341, 1380, 1379, 448
810, 329, 324, 259, 327, 374, 1375, 1381, 349, 372, 1376
811, 437, 331, 59, 436, 1379, 357, 448, 451, 1382, 453
812, 321, 264, 327, 376, 1383, 1378, 368, 1385, 1384, 1386
813, 410, 230, 326, 406, 1388, 1370, 1387, 421, 1374, 1372
814, 329, 230, 262, 406, 1371, 1389, 1390, 1373, 1374, 1391
815, 229, 327, 262, 264, 1394, 1392, 1393, 1395, 1378, 317
816, 408, 257, 328, 256, 1398, 1396, 1397, 1399, 308, 1400
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
** Define element set Eall
*ELSET, ELSET=Eall
Evolumes


***********************************************************
** Element sets for materials and FEM element type (solid, shell, beam, fluid)
** written by write_element_sets_material_and_femelement_type function
*ELSET,ELSET=MaterialSolid
Evolumes

***********************************************************
** constraints fixed node sets
** written by write_node_sets_constraints_fixed function
** ConstraintFixed
*NSET,NSET=ConstraintFixed
9,
10,
11,
12,
114,
115,
116,
117,
118,
179,
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
***********************************************************
** constraints sectionprint surface sets
** written by write_surfaces_constraints_sectionprint function
** ConstraintSectionPrint
*SURFACE, NAME=SECTIONFACEConstraintSectionPrint
811,S4
872,S2
880,S1
921,S4
938,S1
944,S1
950,S1
952,S4
960,S3
961,S4
963,S1
965,S3
967,S4
971,S4
1417,S4
1698,S4
1741,S4
1763,S1
1781,S1
1788,S1
1792,S1
1795,S1
1799,S1
1800,S1
1802,S1
1816,S3
1819,S4
1823,S4

***********************************************************
** Materials
** written by write_materials function
** Young's modulus unit is MPa = N/mm2
** FreeCAD material name: CalculiX-Steel
** Material
*MATERIAL, NAME=Material
*ELASTIC
210000, 0.300

***********************************************************
** Sections
** written by write_femelementsets function
*SOLID SECTION, ELSET=MaterialSolid, MATERIAL=Material

***********************************************************
** At least one step is needed to run an CalculiX analysis of FreeCAD
** written by write_step_begin function
*STEP
*STATIC


***********************************************************
** Fixed Constraints
** written by write_constraints_fixed function
** ConstraintFixed
*BOUNDARY
ConstraintFixed,1
ConstraintFixed,2
ConstraintFixed,3


***********************************************************
** SectionPrint Constraints
** written by write_constraints_sectionprint function
** ConstraintSectionPrint
*SECTION PRINT, SURFACE=SECTIONFACEConstraintSectionPrint, NAME=SECTIONPRINTConstraintSectionPrint
SOF, SOM, SOAREA

***********************************************************
** constraints pressure element face loads
** written by write_constraints_pressure function
** ConstraintPressure
*DLOAD
** ConstraintPressure: face load
846,P3,100.0
861,P1,100.0
875,P4,100.0
883,P3,100.0
887,P1,100.0
888,P1,100.0
903,P1,100.0
929,P4,100.0
933,P3,100.0
936,P1,100.0
937,P1,100.0
940,P1,100.0
941,P1,100.0
946,P4,100.0
949,P2,100.0
951,P4,100.0
954,P3,100.0
955,P4,100.0

***********************************************************
** Outputs --> frd file
** written by write_outputs_types function
*NODE FILE
U
*EL FILE
S, E
** outputs --> dat file
** reaction forces for Constraint fixed
*NODE PRINT, NSET=ConstraintFixed, TOTALS=ONLY
RF


***********************************************************
** written by write_step_end function
*END STEP

***********************************************************
** CalculiX Input file
** written by write_footer function
**   written by    --> FreeCAD 0.19.21759 (Git)
**   written on    --> Wed Jun 24 09:14:56 2020
**   file name     -->
**   analysis name --> Analysis
**
**
***********************************************************
**  About units:
**  See ccx manual, ccx does not know about any unit.
**  Golden rule: The user must make sure that the numbers he provides have consistent units.
**  The user is the FreeCAD calculix writer module ;-)
**
**  The unit system which is used at Guido Dhondt's company: mm, N, s, K
**  Since Length and Mass are connected by Force, if Length is mm the Mass is in t to get N
**  The following units are used to write to inp file:
**
**  Length: mm (this includes the mesh geometry)
**  Mass: t
**  TimeSpan: s
**  Temperature: K
**
**  This leads to:
**  Force: N
**  Pressure: N/mm^2
**  Density: t/mm^3
**  Gravity: mm/s^2
**  Thermal conductivity: t*mm/K/s^3 (same as W/m/K)
**  Specific Heat: mm^2/s^2/K (same as J/kg/K)
**
