** written by FreeCAD inp file writer for CalculiX,Abaqus meshes
** highest dimension mesh elements only.

** Nodes
*Node, NSET=Nall
1, 40, 0, 0
2, 40, 0, 10
3, 40, 10, 0
4, 40, 10, 10
5, 60, 0, 0
6, 60, 0, 10
7, 60, 10, 0
8, 60, 10, 10
9, 80, 0, 0
10, 80, 0, 10
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

** Volume elements
*Element, TYPE=C3D10, ELSET=Evolumes
819, 786, 1282, 751, 6254, 6319, 6318, 967, 6321, 6320, 6322
820, 1270, 1766, 1302, 6254, 6324, 6323, 1386, 6326, 6325, 6327
821, 643, 632, 785, 6257, 668, 6328, 6329, 6331, 6330, 6332
822, 1256, 6242, 6262, 6307, 6335, 6333, 6334, 6337, 6336, 6338
823, 6242, 1256, 6262, 6299, 6335, 6334, 6333, 6340, 6339, 6341
824, 645, 634, 6255, 6259, 705, 6342, 6343, 6345, 6344, 6346
825, 6242, 1256, 6299, 6307, 6335, 6339, 6340, 6336, 6337, 6347
826, 1036, 6252, 6266, 6314, 6350, 6348, 6349, 6352, 6351, 6353
827, 634, 645, 6255, 6303, 705, 6343, 6342, 6355, 6354, 6356
828, 6274, 6248, 6242, 6302, 6359, 6357, 6358, 6361, 6360, 6362
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
** Define element set Eall
*ELSET, ELSET=Eall
Evolumes


***********************************************************
** Element sets for materials and FEM element type (solid, shell, beam, fluid)
** written by write_element_sets_material_and_femelement_type function
*ELSET,ELSET=FemMaterial1Solid
819,
820,
821,
822,
823,
824,
825,
826,
827,
828,
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*ELSET,ELSET=FemMaterial2Solid
6676,
6677,
6678,
6679,
6680,
6681,
6682,
6683,
6684,
6685,
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*ELSET,ELSET=FemMaterial3Solid
2285,
2286,
2287,
2288,
2289,
2290,
2291,
2292,
2293,
2294,
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
***********************************************************
** constraints fixed node sets
** written by write_node_sets_constraints_fixed function
** ConstraintFixed
*NSET,NSET=ConstraintFixed
13,
14,
15,
16,
17,
18,
19,
20,
228,
229,
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
***********************************************************
** Materials
** written by write_materials function
** Young's modulus unit is MPa = N/mm2
** FreeCAD material name: Concrete-Generic
** FemMaterial1
*MATERIAL, NAME=FemMaterial1
*ELASTIC
32000, 0.170
** FreeCAD material name: PLA
** FemMaterial2
*MATERIAL, NAME=FemMaterial2
*ELASTIC
3640, 0.360
** FreeCAD material name: Steel-Generic
** FemMaterial3
*MATERIAL, NAME=FemMaterial3
*ELASTIC
200000, 0.300

***********************************************************
** Sections
** written by write_femelementsets function
*SOLID SECTION, ELSET=FemMaterial1Solid, MATERIAL=FemMaterial1
*SOLID SECTION, ELSET=FemMaterial2Solid, MATERIAL=FemMaterial2
*SOLID SECTION, ELSET=FemMaterial3Solid, MATERIAL=FemMaterial3

***********************************************************
** At least one step is needed to run an CalculiX analysis of FreeCAD
** written by write_step_begin function
*STEP
*STATIC


***********************************************************
** Fixed Constraints
** written by write_constraints_fixed function
** ConstraintFixed
*BOUNDARY
ConstraintFixed,1
ConstraintFixed,2
ConstraintFixed,3


***********************************************************
** constraints force node loads
** written by write_constraints_force function
*CLOAD
** ConstraintForce
** node loads on shape: Box1:Face6
17,3,-0.0000000000000E+00
19,3,-0.0000000000000E+00
22,3,-0.0000000000000E+00
23,3,-0.0000000000000E+00
406,3,-0.0000000000000E+00
407,3,-0.0000000000000E+00
408,3,-0.0000000000000E+00
409,3,-0.0000000000000E+00
410,3,-5.5694444444484E+00
411,3,-4.4481737404064E+00
412,3,-6.6928097972000E+00
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
** node loads on shape: Box2:Face6
2,3,-0.0000000000000E+00
4,3,-0.0000000000000E+00
22,3,-0.0000000000000E+00
23,3,-0.0000000000000E+00
43,3,-0.0000000000000E+00
44,3,-0.0000000000000E+00
45,3,-0.0000000000000E+00
46,3,-0.0000000000000E+00
47,3,-5.5694444446420E+00
48,3,-4.3711646419272E+00
49,3,-6.7030454307403E+00
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
** node loads on shape: Box3:Face6
2,3,-0.0000000000000E+00
4,3,-0.0000000000000E+00
6,3,-0.0000000000000E+00
8,3,-0.0000000000000E+00
43,3,-0.0000000000000E+00
44,3,-0.0000000000000E+00
45,3,-0.0000000000000E+00
46,3,-0.0000000000000E+00
47,3,-5.5694444446420E+00
48,3,-4.3711646419272E+00
49,3,-6.7030454307403E+00
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
** node loads on shape: Box4:Face6
6,3,-0.0000000000000E+00
8,3,-0.0000000000000E+00
10,3,-0.0000000000000E+00
12,3,-0.0000000000000E+00
155,3,-0.0000000000000E+00
156,3,-0.0000000000000E+00
157,3,-0.0000000000000E+00
158,3,-0.0000000000000E+00
159,3,-3.6148488891667E+00
160,3,-4.9560604148333E+00
161,3,-6.5089699073333E+00
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
** node loads on shape: Box5:Face6
10,3,-0.0000000000000E+00
12,3,-0.0000000000000E+00
14,3,-0.0000000000000E+00
16,3,-0.0000000000000E+00
191,3,-0.0000000000000E+00
192,3,-0.0000000000000E+00
193,3,-0.0000000000000E+00
194,3,-0.0000000000000E+00
195,3,-3.9949845133413E+00
196,3,-4.9560604147048E+00
197,3,-6.5089699073333E+00
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

***********************************************************
** Outputs --> frd file
** written by write_outputs_types function
*NODE FILE
U
*EL FILE
S, E
** outputs --> dat file
** reaction forces for Constraint fixed
*NODE PRINT, NSET=ConstraintFixed, TOTALS=ONLY
RF


***********************************************************
** written by write_step_end function
*END STEP

***********************************************************
** CalculiX Input file
** written by write_footer function
**   written by    --> FreeCAD 0.19.21802 +11 (Git)
**   written on    --> Fri Jul  3 22:09:27 2020
**   file name     -->
**   analysis name --> Analysis
**
**
***********************************************************
**  About units:
**  See ccx manual, ccx does not know about any unit.
**  Golden rule: The user must make sure that the numbers he provides have consistent units.
**  The user is the FreeCAD calculix writer module ;-)
**
**  The unit system which is used at Guido Dhondt's company: mm, N, s, K
**  Since Length and Mass are connected by Force, if Length is mm the Mass is in t to get N
**  The following units are used to write to inp file:
**
**  Length: mm (this includes the mesh geometry)
**  Mass: t
**  TimeSpan: s
**  Temperature: K
**
**  This leads to:
**  Force: N
**  Pressure: N/mm^2
**  Density: t/mm^3
**  Gravity: mm/s^2
**  Thermal conductivity: t*mm/K/s^3 (same as W/m/K)
**  Specific Heat: mm^2/s^2/K (same as J/kg/K)
**
