** written by FreeCAD inp file writer for CalculiX,Abaqus meshes
** highest dimension mesh elements only.

** Nodes
*Node, NSET=Nall
1, 100, 10, 0
2, 100, 0, 0
3, 80, 10, 0
4, 80, 0, 0
5, 60, 10, 0
6, 60, 0, 0
7, 40, 10, 0
8, 40, 0, 0
9, 20, 10, 0
10, 20, 0, 0
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

** Face elements
*Element, TYPE=S6, ELSET=Efaces
131, 13, 4, 17, 352, 357, 482
132, 14, 13, 127, 353, 483, 484
133, 15, 14, 128, 354, 485, 486
134, 14, 127, 128, 484, 487, 485
135, 16, 15, 129, 355, 488, 489
136, 15, 128, 129, 486, 490, 488
137, 3, 16, 130, 356, 491, 492
138, 26, 3, 130, 367, 492, 493
139, 16, 129, 130, 489, 494, 491
140, 17, 18, 131, 358, 495, 496
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
** Define element set Eall
*ELSET, ELSET=Eall
Efaces


***********************************************************
** Element sets for materials and FEM element type (solid, shell, beam, fluid)
** written by write_element_sets_material_and_femelement_type function
*ELSET,ELSET=FemMaterial1ShellThickness
367,
368,
369,
370,
371,
372,
373,
374,
375,
376,
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*ELSET,ELSET=FemMaterial2ShellThickness
485,
486,
487,
488,
489,
490,
491,
492,
493,
494,
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*ELSET,ELSET=FemMaterial3ShellThickness
131,
132,
133,
134,
135,
136,
137,
138,
139,
140,
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
***********************************************************
** constraints fixed node sets
** written by write_node_sets_constraints_fixed function
** ConstraintFixed
*NSET,NSET=ConstraintFixed
1,
2,
11,
12,
35,
36,
37,
38,
105,
106,
107,
108,
377,
378,
379,
380,
381,
457,
458,
459,
460,
461,

***********************************************************
** Materials
** written by write_materials function
** Young's modulus unit is MPa = N/mm2
** FreeCAD material name: Concrete-Generic
** FemMaterial1
*MATERIAL, NAME=FemMaterial1
*ELASTIC
32000, 0.170
** FreeCAD material name: PLA
** FemMaterial2
*MATERIAL, NAME=FemMaterial2
*ELASTIC
3640, 0.360
** FreeCAD material name: Steel-Generic
** FemMaterial3
*MATERIAL, NAME=FemMaterial3
*ELASTIC
200000, 0.300

***********************************************************
** Sections
** written by write_femelementsets function
*SHELL SECTION, ELSET=FemMaterial1ShellThickness, MATERIAL=FemMaterial1
10.0
*SHELL SECTION, ELSET=FemMaterial2ShellThickness, MATERIAL=FemMaterial2
10.0
*SHELL SECTION, ELSET=FemMaterial3ShellThickness, MATERIAL=FemMaterial3
10.0

***********************************************************
** At least one step is needed to run an CalculiX analysis of FreeCAD
** written by write_step_begin function
*STEP
*STATIC


***********************************************************
** Fixed Constraints
** written by write_constraints_fixed function
** ConstraintFixed
*BOUNDARY
ConstraintFixed,1
ConstraintFixed,2
ConstraintFixed,3
ConstraintFixed,4
ConstraintFixed,5
ConstraintFixed,6


***********************************************************
** constraints force node loads
** written by write_constraints_force function
*CLOAD
** ConstraintForce
** node loads on shape: Face1:Edge4
9,2,-3.3333333333333E+01
11,2,-3.3333333333333E+01
118,2,-6.6666666666667E+01
119,2,-6.6666666666667E+01
120,2,-6.6666666666667E+01
121,2,-6.6666666666667E+01
122,2,-6.6666666666667E+01
123,2,-6.6666666666667E+01
124,2,-6.6666666666667E+01
125,2,-6.6666666666667E+01
126,2,-6.6666666666667E+01
472,2,-1.3333333333333E+02
473,2,-1.3333333333333E+02
474,2,-1.3333333333333E+02
475,2,-1.3333333333333E+02
476,2,-1.3333333333333E+02
477,2,-1.3333333333333E+02
478,2,-1.3333333333333E+02
479,2,-1.3333333333333E+02
480,2,-1.3333333333333E+02
481,2,-1.3333333333333E+02

** node loads on shape: Face2:Edge4
7,2,-3.3333333333333E+01
9,2,-3.3333333333333E+01
96,2,-6.6666666666667E+01
97,2,-6.6666666666667E+01
98,2,-6.6666666666667E+01
99,2,-6.6666666666667E+01
100,2,-6.6666666666667E+01
101,2,-6.6666666666667E+01
102,2,-6.6666666666667E+01
103,2,-6.6666666666667E+01
104,2,-6.6666666666667E+01
447,2,-1.3333333333333E+02
448,2,-1.3333333333333E+02
449,2,-1.3333333333333E+02
450,2,-1.3333333333333E+02
451,2,-1.3333333333333E+02
452,2,-1.3333333333333E+02
453,2,-1.3333333333333E+02
454,2,-1.3333333333333E+02
455,2,-1.3333333333333E+02
456,2,-1.3333333333333E+02

** node loads on shape: Face3:Edge4
5,2,-3.3333333333333E+01
7,2,-3.3333333333333E+01
74,2,-6.6666666666667E+01
75,2,-6.6666666666667E+01
76,2,-6.6666666666667E+01
77,2,-6.6666666666667E+01
78,2,-6.6666666666667E+01
79,2,-6.6666666666667E+01
80,2,-6.6666666666667E+01
81,2,-6.6666666666667E+01
82,2,-6.6666666666667E+01
422,2,-1.3333333333333E+02
423,2,-1.3333333333333E+02
424,2,-1.3333333333333E+02
425,2,-1.3333333333333E+02
426,2,-1.3333333333333E+02
427,2,-1.3333333333333E+02
428,2,-1.3333333333333E+02
429,2,-1.3333333333333E+02
430,2,-1.3333333333333E+02
431,2,-1.3333333333333E+02

** node loads on shape: Face4:Edge4
3,2,-3.3333333333333E+01
5,2,-3.3333333333333E+01
52,2,-6.6666666666667E+01
53,2,-6.6666666666667E+01
54,2,-6.6666666666667E+01
55,2,-6.6666666666667E+01
56,2,-6.6666666666667E+01
57,2,-6.6666666666667E+01
58,2,-6.6666666666667E+01
59,2,-6.6666666666667E+01
60,2,-6.6666666666667E+01
397,2,-1.3333333333333E+02
398,2,-1.3333333333333E+02
399,2,-1.3333333333333E+02
400,2,-1.3333333333333E+02
401,2,-1.3333333333333E+02
402,2,-1.3333333333333E+02
403,2,-1.3333333333333E+02
404,2,-1.3333333333333E+02
405,2,-1.3333333333333E+02
406,2,-1.3333333333333E+02

** node loads on shape: Face5:Edge4
1,2,-3.3333333333333E+01
3,2,-3.3333333333333E+01
26,2,-6.6666666666667E+01
27,2,-6.6666666666667E+01
28,2,-6.6666666666667E+01
29,2,-6.6666666666667E+01
30,2,-6.6666666666667E+01
31,2,-6.6666666666667E+01
32,2,-6.6666666666667E+01
33,2,-6.6666666666667E+01
34,2,-6.6666666666667E+01
367,2,-1.3333333333333E+02
368,2,-1.3333333333333E+02
369,2,-1.3333333333333E+02
370,2,-1.3333333333333E+02
371,2,-1.3333333333333E+02
372,2,-1.3333333333333E+02
373,2,-1.3333333333333E+02
374,2,-1.3333333333333E+02
375,2,-1.3333333333333E+02
376,2,-1.3333333333333E+02


***********************************************************
** Outputs --> frd file
** written by write_outputs_types function
*NODE FILE, OUTPUT=2d
U
*EL FILE
S, E
** outputs --> dat file
** reaction forces for Constraint fixed
*NODE PRINT, NSET=ConstraintFixed, TOTALS=ONLY
RF


***********************************************************
** written by write_step_end function
*END STEP

***********************************************************
** CalculiX Input file
** written by write_footer function
**   written by    --> FreeCAD 0.19.21802 +11 (Git)
**   written on    --> Sat Jul  4 00:18:53 2020
**   file name     -->
**   analysis name --> Analysis
**
**
***********************************************************
**  About units:
**  See ccx manual, ccx does not know about any unit.
**  Golden rule: The user must make sure that the numbers he provides have consistent units.
**  The user is the FreeCAD calculix writer module ;-)
**
**  The unit system which is used at Guido Dhondt's company: mm, N, s, K
**  Since Length and Mass are connected by Force, if Length is mm the Mass is in t to get N
**  The following units are used to write to inp file:
**
**  Length: mm (this includes the mesh geometry)
**  Mass: t
**  TimeSpan: s
**  Temperature: K
**
**  This leads to:
**  Force: N
**  Pressure: N/mm^2
**  Density: t/mm^3
**  Gravity: mm/s^2
**  Thermal conductivity: t*mm/K/s^3 (same as W/m/K)
**  Specific Heat: mm^2/s^2/K (same as J/kg/K)
**
