** written by FreeCAD inp file writer for CalculiX,Abaqus meshes
** highest dimension mesh elements only.

** Nodes
*Node, NSET=Nall
1, -142.5, 142.5, 0
2, -142.5, -142.5, 0
3, -142.5, 142.5, 1000
4, -142.5, -142.5, 1000
5, -142.5, 95, 0
6, -142.5, 47.5, 0
7, -142.5, 0, 0
8, -142.5, -47.5, 0
9, -142.5, -95, 0
10, -142.5, 142.5, 50
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

** Face elements
*Element, TYPE=S6, ELSET=Efaces
1, 125, 112, 49, 724, 565, 566
2, 125, 119, 112, 742, 723, 724
3, 125, 120, 119, 744, 741, 742
4, 125, 126, 120, 755, 745, 744
5, 125, 50, 126, 568, 569, 755
6, 125, 49, 50, 566, 564, 568
7, 120, 117, 119, 737, 736, 741
8, 120, 118, 117, 738, 735, 737
9, 120, 123, 118, 743, 740, 738
10, 120, 126, 123, 745, 751, 743
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
** Define element set Eall
*ELSET, ELSET=Eall
Efaces


***********************************************************
** Element sets for materials and FEM element type (solid, shell, beam, fluid)
** written by write_element_sets_material_and_femelement_type function
*ELSET,ELSET=FemMaterialShellThickness
Efaces

***********************************************************
** constraints fixed node sets
** written by write_node_sets_constraints_fixed function
** ConstraintFixed
*NSET,NSET=ConstraintFixed
3,
4,
29,
30,
31,
32,
33,
130,
136,
137,
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
***********************************************************
** Materials
** written by write_materials function
** Young's modulus unit is MPa = N/mm2
** FreeCAD material name: Steel-Generic
** FemMaterial
*MATERIAL, NAME=FemMaterial
*ELASTIC
200000, 0.300

***********************************************************
** Sections
** written by write_femelementsets function
*SHELL SECTION, ELSET=FemMaterialShellThickness, MATERIAL=FemMaterial
15.0

***********************************************************
** At least one step is needed to run an CalculiX analysis of FreeCAD
** written by write_step_begin function
*STEP
*STATIC


***********************************************************
** Fixed Constraints
** written by write_constraints_fixed function
** ConstraintFixed
*BOUNDARY
ConstraintFixed,1
ConstraintFixed,2
ConstraintFixed,3
ConstraintFixed,4
ConstraintFixed,5
ConstraintFixed,6


***********************************************************
** constraints force node loads
** written by write_constraints_force function
*CLOAD
** ConstraintForce1
** node loads on shape: SquareTube:Edge9
1,1,2.7777777777778E+03
236,1,2.7777777777778E+03
343,1,5.5555555555556E+03
344,1,5.5555555555556E+03
345,1,5.5555555555556E+03
346,1,5.5555555555556E+03
347,1,5.5555555555556E+03
1376,1,1.1111111111111E+04
1378,1,1.1111111111111E+04
1380,1,1.1111111111111E+04
1383,1,1.1111111111111E+04
1386,1,1.1111111111111E+04
1390,1,1.1111111111111E+04


** ConstraintForce2
** node loads on shape: SquareTube:Edge3
2,1,-2.7777777777778E+03
129,1,-2.7777777777778E+03
131,1,-5.5555555555556E+03
132,1,-5.5555555555556E+03
133,1,-5.5555555555556E+03
134,1,-5.5555555555556E+03
135,1,-5.5555555555556E+03
758,1,-1.1111111111111E+04
762,1,-1.1111111111111E+04
764,1,-1.1111111111111E+04
766,1,-1.1111111111111E+04
769,1,-1.1111111111111E+04
772,1,-1.1111111111111E+04


** ConstraintForce3
** node loads on shape: SquareTube:Edge11
1,2,2.7777777777778E+03
2,2,2.7777777777778E+03
5,2,5.5555555555556E+03
6,2,5.5555555555556E+03
7,2,5.5555555555556E+03
8,2,5.5555555555556E+03
9,2,5.5555555555556E+03
429,2,1.1111111111111E+04
431,2,1.1111111111111E+04
437,2,1.1111111111111E+04
440,2,1.1111111111111E+04
443,2,1.1111111111111E+04
446,2,1.1111111111111E+04


** ConstraintForce4
** node loads on shape: SquareTube:Edge6
129,2,-2.7777777777778E+03
236,2,-2.7777777777778E+03
238,2,-5.5555555555556E+03
239,2,-5.5555555555556E+03
240,2,-5.5555555555556E+03
241,2,-5.5555555555556E+03
242,2,-5.5555555555556E+03
1067,2,-1.1111111111111E+04
1071,2,-1.1111111111111E+04
1073,2,-1.1111111111111E+04
1075,2,-1.1111111111111E+04
1078,2,-1.1111111111111E+04
1081,2,-1.1111111111111E+04


***********************************************************
** Outputs --> frd file
** written by write_outputs_types function
*NODE FILE, OUTPUT=2d
U
*EL FILE
S, E
** outputs --> dat file
** reaction forces for Constraint fixed
*NODE PRINT, NSET=ConstraintFixed, TOTALS=ONLY
RF


***********************************************************
** written by write_step_end function
*END STEP

***********************************************************
** CalculiX Input file
** written by write_footer function
**   written by    --> FreeCAD 0.19.21972 +18 (Git)
**   written on    --> Fri Jul 17 22:12:38 2020
**   file name     -->
**   analysis name --> Analysis
**
**
***********************************************************
**  About units:
**  See ccx manual, ccx does not know about any unit.
**  Golden rule: The user must make sure that the numbers he provides have consistent units.
**  The user is the FreeCAD calculix writer module ;-)
**
**  The unit system which is used at Guido Dhondt's company: mm, N, s, K
**  Since Length and Mass are connected by Force, if Length is mm the Mass is in t to get N
**  The following units are used to write to inp file:
**
**  Length: mm (this includes the mesh geometry)
**  Mass: t
**  TimeSpan: s
**  Temperature: K
**
**  This leads to:
**  Force: N
**  Pressure: N/mm^2
**  Density: t/mm^3
**  Gravity: mm/s^2
**  Thermal conductivity: t*mm/K/s^3 (same as W/m/K)
**  Specific Heat: mm^2/s^2/K (same as J/kg/K)
**
