** written by FreeCAD inp file writer for CalculiX,Abaqus meshes
** highest dimension mesh elements only.

** Nodes
*Node, NSET=Nall
1, 0, 0, 0
2, 0, 0, 1
3, 0, 5, 1
4, 0, 5, 0
5, 100, 0, 0
6, 100, 0, 1
7, 100, 5, 1
8, 100, 5, 0
9, 0, 0, 2
10, 0, 5, 2
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

** Volume elements
*Element, TYPE=C3D10, ELSET=Evolumes
1431, 1302, 7, 22, 525, 1313, 24, 1314, 2260, 530, 532
1432, 26, 525, 8, 1053, 533, 531, 28, 1064, 2261, 1065
1433, 1054, 4, 18, 514, 1058, 20, 1059, 2262, 519, 522
1434, 514, 1303, 3, 14, 2263, 1308, 520, 521, 1307, 16
1435, 1052, 5, 26, 524, 1061, 27, 1062, 2264, 526, 528
1436, 1301, 22, 6, 524, 1310, 23, 1311, 2265, 529, 527
1437, 225, 8, 775, 1053, 265, 818, 821, 1066, 1065, 2266
1438, 1302, 7, 775, 304, 1313, 819, 2267, 1315, 344, 820
1439, 513, 14, 2, 1300, 518, 15, 515, 2268, 1305, 1304
1440, 513, 1, 18, 1051, 516, 19, 517, 2269, 1056, 1055
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
** Define element set Eall
*ELSET, ELSET=Eall
Evolumes


***********************************************************
** Element sets for materials and FEM element type (solid, shell, beam, fluid)
** written by write_element_sets_material_and_femelement_type function
*ELSET,ELSET=MaterialCopperSolid
1431,
1432,
1433,
1434,
1435,
1436,
1437,
1438,
1439,
1440,
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*ELSET,ELSET=MaterialInvarSolid
2181,
2182,
2183,
2184,
2185,
2186,
2187,
2188,
2189,
2190,
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
***********************************************************
** constraints fixed node sets
** written by write_node_sets_constraints_fixed function
** ConstraintFixed
*NSET,NSET=ConstraintFixed
1,
2,
3,
4,
9,
10,
13,
14,
15,
16,
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
***********************************************************
** constraints temperature node sets
** written by write_node_sets_constraints_temperature function
** ConstraintTemperature
*NSET,NSET=ConstraintTemperature
1,
2,
3,
4,
5,
6,
7,
8,
9,
10,
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
***********************************************************
** Materials
** written by write_materials function
** Young's modulus unit is MPa = N/mm2
** Thermal conductivity unit is kW/mm/K = t*mm/K*s^3
** Specific Heat unit is kJ/t/K = mm^2/s^2/K
** FreeCAD material name: Copper
** MaterialCopper
*MATERIAL, NAME=MaterialCopper
*ELASTIC
130000, 0.354
*CONDUCTIVITY
200.000
*EXPANSION
2.000e-05
*SPECIFIC HEAT
3.850e+08
** FreeCAD material name: Invar
** MaterialInvar
*MATERIAL, NAME=MaterialInvar
*ELASTIC
137000, 0.280
*CONDUCTIVITY
13.000
*EXPANSION
1.200e-06
*SPECIFIC HEAT
5.100e+08

***********************************************************
** Initial temperature constraint
** written by write_constraints_initialtemperature function
*INITIAL CONDITIONS,TYPE=TEMPERATURE
Nall,273.0

***********************************************************
** Sections
** written by write_femelementsets function
*SOLID SECTION, ELSET=MaterialCopperSolid, MATERIAL=MaterialCopper
*SOLID SECTION, ELSET=MaterialInvarSolid, MATERIAL=MaterialInvar

***********************************************************
** At least one step is needed to run an CalculiX analysis of FreeCAD
** written by write_step_begin function
*STEP, INC=2000
*COUPLED TEMPERATURE-DISPLACEMENT, SOLVER=SPOOLES, STEADY STATE
1.0,1.0

***********************************************************
** Fixed Constraints
** written by write_constraints_fixed function
** ConstraintFixed
*BOUNDARY
ConstraintFixed,1
ConstraintFixed,2
ConstraintFixed,3


***********************************************************
** Fixed temperature constraint applied
** written by write_constraints_temperature function
** ConstraintTemperature
*BOUNDARY
ConstraintTemperature,11,11,373.0


***********************************************************
** Outputs --> frd file
** written by write_outputs_types function
*NODE FILE
U, NT
*EL FILE
S, E
** outputs --> dat file
** reaction forces for Constraint fixed
*NODE PRINT, NSET=ConstraintFixed, TOTALS=ONLY
RF


***********************************************************
** written by write_step_end function
*END STEP

***********************************************************
** CalculiX Input file
** written by write_footer function
**   written by    --> FreeCAD 0.19.19501 (Git)
**   written on    --> Thu Feb  6 23:22:33 2020
**   file name     -->
**   analysis name --> Analysis
**
**
***********************************************************
**  About units:
**  See ccx manual, ccx does not know about any unit.
**  Golden rule: The user must make sure that the numbers he provides have consistent units.
**  The user is the FreeCAD calculix writer module ;-)
**
**  The unit system which is used at Guido Dhondt's company: mm, N, s, K
**  Since Length and Mass are connected by Force, if Length is mm the Mass is in t to get N
**  The following units are used to write to inp file:
**
**  Length: mm (this includes the mesh geometry)
**  Mass: t
**  TimeSpan: s
**  Temperature: K
**
**  This leads to:
**  Force: N
**  Pressure: N/mm^2
**  Density: t/mm^3
**  Gravity: mm/s^2
**  Thermal conductivity: t*mm/K/s^3 (same as W/m/K)
**  Specific Heat: mm^2/s^2/K (same as J/kg/K)
**
