** written by FreeCAD inp file writer for CalculiX,Abaqus meshes
** highest dimension mesh elements only.

** Nodes
*Node, NSET=Nall
1, 286, 25, -247
2, 286, 25, 253
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

** Volume elements
*Element, TYPE=C3D10, ELSET=Evolumes
1281, 32, 67, 33, 180, 1159, 1160, 587, 777, 2218, 778
1282, 23, 171, 57, 24, 752, 2219, 1173, 578, 753, 1141
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
** Define element set Eall
*ELSET, ELSET=Eall
Evolumes


***********************************************************
** Element sets for materials and FEM element type (solid, shell, beam, fluid)
** written by write_element_sets_material_and_femelement_type function
*ELSET,ELSET=MechanicalMaterialSolid
Evolumes

***********************************************************
** Node sets for fixed constraint
** written by write_node_sets_constraints_fixed function
** ConstraintFixed
*NSET,NSET=ConstraintFixed
1,
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
***********************************************************
** constraints contact surface sets
** written by write_surfaces_constraints_contact function
** ConstraintContact
*SURFACE, NAME=DEPConstraintContact
1344,S4
1655,S1
1703,S3
1704,S4
1728,S3
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2596,S3
*SURFACE, NAME=INDConstraintContact
1283,S2
1286,S1
1289,S1
1290,S3
1292,S1
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2345,S4

***********************************************************
** Materials
** written by write_materials function
** Young's modulus unit is MPa = N/mm2
** FreeCAD material name: Steel-Generic
** MechanicalMaterial
*MATERIAL, NAME=MechanicalMaterial
*ELASTIC
200000, 0.300

***********************************************************
** Sections
** written by write_femelementsets function
*SOLID SECTION, ELSET=MechanicalMaterialSolid, MATERIAL=MechanicalMaterial

***********************************************************
** Contact Constraints
** written by write_constraints_contact function
** ConstraintContact
*CONTACT PAIR, INTERACTION=INTConstraintContact,TYPE=SURFACE TO SURFACE
DEPConstraintContact,INDConstraintContact
*SURFACE INTERACTION, NAME=INTConstraintContact
*SURFACE BEHAVIOR,PRESSURE-OVERCLOSURE=LINEAR
1000000.0

***********************************************************
** At least one step is needed to run an CalculiX analysis of FreeCAD
** written by write_step_begin function
*STEP
*STATIC


***********************************************************
** Fixed Constraints
** written by write_constraints_fixed function
** ConstraintFixed
*BOUNDARY
ConstraintFixed,1
ConstraintFixed,2
ConstraintFixed,3


***********************************************************
** Element + CalculiX face + load in [MPa]
** written by write_constraints_pressure function
** ConstraintPressure
*DLOAD
** ConstraintPressure: face load
1322,P2,100.0
1516,P1,100.0
1701,P1,100.0
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2596,P2,100.0

***********************************************************
** Outputs --> frd file
** written by write_outputs_types function
*NODE FILE
U
*EL FILE
S, E
** outputs --> dat file
** reaction forces for Constraint fixed
*NODE PRINT, NSET=ConstraintFixed, TOTALS=ONLY
RF


***********************************************************
** written by write_step_end function
*END STEP

***********************************************************
** CalculiX Input file
** written by write_footer function
**   written by    --> FreeCAD 0.19.19463 (Git)
**   written on    --> Mon Feb  3 23:28:02 2020
**   file name     -->
**   analysis name --> Analysis
**
**
**
**   Units
**
**   Geometry (mesh data)        --> mm
**   Materials (Young's modulus) --> N/mm2 = MPa
**   Loads (nodal loads)         --> N
**
