** written by FreeCAD inp file writer for CalculiX,Abaqus meshes
** highest dimension mesh elements only.

** Nodes
*Node, NSET=Nall
1, 67, -1.776356838198e-15, -15
2, 67, -1.776356838198e-15, 15
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

** Volume elements
*Element, TYPE=C3D10, ELSET=Evolumes
807, 329, 326, 230, 406, 348, 1370, 1371, 1373, 1372, 1374
808, 327, 324, 259, 264, 372, 1375, 1376, 1378, 1377, 316
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
** Define element set Eall
*ELSET, ELSET=Eall
Evolumes


***********************************************************
** Element sets for materials and FEM element type (solid, shell, beam, fluid)
** written by write_element_sets_material_and_femelement_type function
*ELSET,ELSET=MaterialSolid
Evolumes

***********************************************************
** constraints fixed node sets
** written by write_node_sets_constraints_fixed function
** ConstraintFixed
*NSET,NSET=ConstraintFixed
9,
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
***********************************************************
** constraints sectionprint surface sets
** written by write_surfaces_constraints_sectionprint function
** ConstraintSectionPrint
*SURFACE, NAME=SECTIONFACE1
811,S4
872,S2
880,S1
921,S4
938,S1
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1823,S4

***********************************************************
** Materials
** written by write_materials function
** Young's modulus unit is MPa = N/mm2
** FreeCAD material name: CalculiX-Steel
** Material
*MATERIAL, NAME=Material
*ELASTIC
210000, 0.300

***********************************************************
** Sections
** written by write_femelementsets function
*SOLID SECTION, ELSET=MaterialSolid, MATERIAL=Material

***********************************************************
** At least one step is needed to run an CalculiX analysis of FreeCAD
** written by write_step_begin function
*STEP
*STATIC


***********************************************************
** Fixed Constraints
** written by write_constraints_fixed function
** ConstraintFixed
*BOUNDARY
ConstraintFixed,1
ConstraintFixed,2
ConstraintFixed,3


***********************************************************
** SectionPrint Constraints
** written by write_constraints_sectionprint function
** ConstraintSectionPrint
*SECTION PRINT, SURFACE=SECTIONFACE1, NAME=SECTIONPRINT1
SOF, SOM, SOAREA

***********************************************************
** constraints pressure element face loads
** written by write_constraints_pressure function
** ConstraintPressure
*DLOAD
** ConstraintPressure: face load
846,P3,100.0
861,P1,100.0
875,P4,100.0
883,P3,100.0
887,P1,100.0
888,P1,100.0
903,P1,100.0
929,P4,100.0
933,P3,100.0
936,P1,100.0
937,P1,100.0
940,P1,100.0
941,P1,100.0
946,P4,100.0
949,P2,100.0
951,P4,100.0
954,P3,100.0
955,P4,100.0

***********************************************************
** Outputs --> frd file
** written by write_outputs_types function
*NODE FILE
U
*EL FILE
S, E
** outputs --> dat file
** reaction forces for Constraint fixed
*NODE PRINT, NSET=ConstraintFixed, TOTALS=ONLY
RF


***********************************************************
** written by write_step_end function
*END STEP

***********************************************************
** CalculiX Input file
** written by write_footer function
**   written by    --> FreeCAD 0.19.21759 (Git)
**   written on    --> Wed Jun 24 09:14:56 2020
**   file name     -->
**   analysis name --> Analysis
**
**
**
**   Units
**
**   Geometry (mesh data)        --> mm
**   Materials (Young's modulus) --> N/mm2 = MPa
**   Loads (nodal loads)         --> N
**
