** written by FreeCAD inp file writer for CalculiX,Abaqus meshes
** highest dimension mesh elements only.

** Nodes
*Node, NSET=Nall
1, 0, 0, 0
2, 0, 0, 10
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

** Volume elements
*Element, TYPE=C3D10, ELSET=Evolumes
1, 95, 98, 47, 196, 103, 197, 198, 200, 199, 201
2, 147, 121, 145, 196, 203, 202, 161, 205, 204, 206
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
** Define element set Eall
*ELSET, ELSET=Eall
Evolumes


***********************************************************
** Element sets for materials and FEM element type (solid, shell, beam, fluid)
** written by write_element_sets_material_and_femelement_type function
*ELSET,ELSET=MechanicalMaterialSolid
Evolumes

***********************************************************
** constraints fixed node sets
** written by write_node_sets_constraints_fixed function
** FemConstraintFixed
*NSET,NSET=FemConstraintFixed
1,
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
***********************************************************
** Materials
** written by write_materials function
** Young's modulus unit is MPa = N/mm2
** FreeCAD material name: Steel-Generic
** MechanicalMaterial
*MATERIAL, NAME=MechanicalMaterial
*ELASTIC
200000, 0.300

***********************************************************
** Sections
** written by write_femelementsets function
*SOLID SECTION, ELSET=MechanicalMaterialSolid, MATERIAL=MechanicalMaterial

***********************************************************
** At least one step is needed to run an CalculiX analysis of FreeCAD
** written by write_step_begin function
*STEP
*STATIC


***********************************************************
** Fixed Constraints
** written by write_constraints_fixed function
** FemConstraintFixed
*BOUNDARY
FemConstraintFixed,1
FemConstraintFixed,2
FemConstraintFixed,3


***********************************************************
** constraints force node loads
** written by write_constraints_force function
*CLOAD
** FemConstraintForce
** node loads on shape: Box:Face6
2,3,-0.0000000000000E+00
4,3,-0.0000000000000E+00
6,3,-0.0000000000000E+00
8,3,-0.0000000000000E+00
18,3,-0.0000000000000E+00
19,3,-8.3333333333333E+02
20,3,-8.3333333333333E+02
30,3,-0.0000000000000E+00
31,3,-8.3333333333333E+02
32,3,-8.3333333333333E+02
36,3,-0.0000000000000E+00
37,3,-8.3333333333333E+02
38,3,-8.3333333333333E+02
42,3,-0.0000000000000E+00
43,3,-8.3333333333333E+02
44,3,-8.3333333333333E+02
170,3,-0.0000000000000E+00
171,3,-0.0000000000000E+00
172,3,-0.0000000000000E+00
173,3,-0.0000000000000E+00
174,3,-0.0000000000000E+00
175,3,-1.6666666666667E+03
176,3,-1.6666666666667E+03
177,3,-1.6666666666667E+03
178,3,-1.6666666666667E+03
179,3,-1.6666666666667E+03
180,3,-1.6666666666667E+03
181,3,-1.6666666666667E+03
182,3,-1.6666666666667E+03
183,3,-1.6666666666667E+03
184,3,-1.6666666666667E+03
185,3,-1.6666666666667E+03
186,3,-1.6666666666667E+03
187,3,-1.6666666666667E+03
188,3,-1.6666666666667E+03
189,3,-1.6666666666667E+03
190,3,-1.6666666666667E+03
191,3,-1.6666666666667E+03
192,3,-1.6666666666667E+03
193,3,-1.6666666666667E+03
194,3,-1.6666666666667E+03


***********************************************************
** Element + CalculiX face + load in [MPa]
** written by write_constraints_pressure function
** FemConstraintPressure
*DLOAD
** FemConstraintPressure: face load
3,P1,1000.0
6,P3,1000.0
9,P2,1000.0
36,P1,1000.0
38,P1,1000.0
56,P1,1000.0
61,P3,1000.0
67,P2,1000.0
68,P3,1000.0
75,P2,1000.0
76,P4,1000.0
78,P4,1000.0
79,P2,1000.0
90,P3,1000.0
105,P3,1000.0
125,P3,1000.0

***********************************************************
** Outputs --> frd file
** written by write_outputs_types function
*NODE FILE
U
*EL FILE
S, E
** outputs --> dat file
** reaction forces for Constraint fixed
*NODE PRINT, NSET=FemConstraintFixed, TOTALS=ONLY
RF


***********************************************************
** written by write_step_end function
*END STEP

***********************************************************
** CalculiX Input file
** written by write_footer function
**   written by    --> FreeCAD 0.17.9749 (Git)
**   written on    --> Sun Jan 22 14:28:56 2017
**   file name     -->
**   analysis name --> Analysis
**
**
**
**   Units
**
**   Geometry (mesh data)        --> mm
**   Materials (Young's modulus) --> N/mm2 = MPa
**   Loads (nodal loads)         --> N
**
