** written by FreeCAD inp file writer for CalculiX,Abaqus meshes
** highest dimension mesh elements only.

** Nodes
*Node, NSET=Nall
1, 0, 0, 10
2, 0, 0, 20
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

** Volume elements
*Element, TYPE=C3D10, ELSET=Evolumes
1, 177, 73, 173, 348, 350, 349, 196, 352, 351, 353
2, 148, 177, 173, 348, 355, 196, 354, 356, 352, 353
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
** Define element set Eall
*ELSET, ELSET=Eall
Evolumes


***********************************************************
** Element sets for materials and FEM element type (solid, shell, beam, fluid)
** written by write_element_sets_material_and_femelement_type function
*ELSET,ELSET=MechanicalMaterialLowSolid
149,
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*ELSET,ELSET=MechanicalMaterialUppSolid
1,
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
***********************************************************
** constraints fixed node sets
** written by write_node_sets_constraints_fixed function
** ConstraintFixed
*NSET,NSET=ConstraintFixed
9,
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
***********************************************************
** Materials
** written by write_materials function
** Young's modulus unit is MPa = N/mm2
** FreeCAD material name: Aluminium-Generic
** MechanicalMaterialLow
*MATERIAL, NAME=MechanicalMaterialLow
*ELASTIC
70000, 0.350
** FreeCAD material name: Steel-Generic
** MechanicalMaterialUpp
*MATERIAL, NAME=MechanicalMaterialUpp
*ELASTIC
200000, 0.300

***********************************************************
** Sections
** written by write_femelementsets function
*SOLID SECTION, ELSET=MechanicalMaterialLowSolid, MATERIAL=MechanicalMaterialLow
*SOLID SECTION, ELSET=MechanicalMaterialUppSolid, MATERIAL=MechanicalMaterialUpp

***********************************************************
** At least one step is needed to run an CalculiX analysis of FreeCAD
** written by write_step_begin function
*STEP
*STATIC


***********************************************************
** Fixed Constraints
** written by write_constraints_fixed function
** ConstraintFixed
*BOUNDARY
ConstraintFixed,1
ConstraintFixed,2
ConstraintFixed,3


***********************************************************
** Element + CalculiX face + load in [MPa]
** written by write_constraints_pressure function
** ConstraintPressure
*DLOAD
** ConstraintPressure: face load
61,P3,1000.0
74,P3,1000.0
75,P3,1000.0
80,P2,1000.0
96,P3,1000.0
99,P3,1000.0
100,P4,1000.0
102,P3,1000.0
117,P3,1000.0
118,P3,1000.0
121,P3,1000.0
124,P4,1000.0
127,P2,1000.0
131,P4,1000.0
132,P4,1000.0
134,P2,1000.0

***********************************************************
** Outputs --> frd file
** written by write_outputs_types function
*NODE FILE
U
*EL FILE
S, E
** outputs --> dat file
** reaction forces for Constraint fixed
*NODE PRINT, NSET=ConstraintFixed, TOTALS=ONLY
RF


***********************************************************
** written by write_step_end function
*END STEP

***********************************************************
** CalculiX Input file
** written by write_footer function
**   written by    --> FreeCAD 0.19.19432 (Git)
**   written on    --> Fri Jan 31 08:06:05 2020
**   file name     -->
**   analysis name --> Analysis
**
**
**
**   Units
**
**   Geometry (mesh data)        --> mm
**   Materials (Young's modulus) --> N/mm2 = MPa
**   Loads (nodal loads)         --> N
**
