** written by FreeCAD inp file writer for CalculiX,Abaqus meshes
** highest dimension mesh elements only.

** Nodes
*Node, NSET=Nall
1, 0, 0, 0
2, 0, 0, 1
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

** Volume elements
*Element, TYPE=C3D10, ELSET=Evolumes
1431, 1302, 7, 22, 525, 1313, 24, 1314, 2260, 530, 532
1432, 26, 525, 8, 1053, 533, 531, 28, 1064, 2261, 1065
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
** Define element set Eall
*ELSET, ELSET=Eall
Evolumes


***********************************************************
** Element sets for materials and FEM element type (solid, shell, beam, fluid)
** written by write_element_sets_material_and_femelement_type function
*ELSET,ELSET=MaterialCopperSolid
1431,
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*ELSET,ELSET=MaterialInvarSolid
2181,
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
***********************************************************
** Node sets for fixed constraint
** written by write_node_sets_constraints_fixed function
** ConstraintFixed
*NSET,NSET=ConstraintFixed
1,
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
***********************************************************
** Node sets for temperature constraints
** written by write_node_sets_constraints_temperature function
** ConstraintTemperature
*NSET,NSET=ConstraintTemperature
1,
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
***********************************************************
** Materials
** written by write_materials function
** Young's modulus unit is MPa = N/mm2
** Thermal conductivity unit is kW/mm/K = t*mm/K*s^3
** Specific Heat unit is kJ/t/K = mm^2/s^2/K
** FreeCAD material name: Copper
** MaterialCopper
*MATERIAL, NAME=MaterialCopper
*ELASTIC
130000, 0.354
*CONDUCTIVITY
200.000
*EXPANSION
2.000e-05
*SPECIFIC HEAT
3.850e+08
** FreeCAD material name: Invar
** MaterialInvar
*MATERIAL, NAME=MaterialInvar
*ELASTIC
137000, 0.280
*CONDUCTIVITY
13.000
*EXPANSION
1.200e-06
*SPECIFIC HEAT
5.100e+08

***********************************************************
** Initial temperature constraint
** written by write_constraints_initialtemperature function
*INITIAL CONDITIONS,TYPE=TEMPERATURE
Nall,273.0

***********************************************************
** Sections
** written by write_femelementsets function
*SOLID SECTION, ELSET=MaterialCopperSolid, MATERIAL=MaterialCopper
*SOLID SECTION, ELSET=MaterialInvarSolid, MATERIAL=MaterialInvar

***********************************************************
** At least one step is needed to run an CalculiX analysis of FreeCAD
** written by write_step_begin function
*STEP, INC=2000
*COUPLED TEMPERATURE-DISPLACEMENT, SOLVER=SPOOLES, STEADY STATE
1.0,1.0

***********************************************************
** Fixed Constraints
** written by write_constraints_fixed function
** ConstraintFixed
*BOUNDARY
ConstraintFixed,1
ConstraintFixed,2
ConstraintFixed,3


***********************************************************
** Fixed temperature constraint applied
** written by write_constraints_temperature function
** ConstraintTemperature
*BOUNDARY
ConstraintTemperature,11,11,373.0


***********************************************************
** Outputs --> frd file
** written by write_outputs_types function
*NODE FILE
U, NT
*EL FILE
S, E
** outputs --> dat file
** reaction forces for Constraint fixed
*NODE PRINT, NSET=ConstraintFixed, TOTALS=ONLY
RF


***********************************************************
** written by write_step_end function
*END STEP

***********************************************************
** CalculiX Input file
** written by write_footer function
**   written by    --> FreeCAD 0.19.19501 (Git)
**   written on    --> Thu Feb  6 23:22:33 2020
**   file name     -->
**   analysis name --> Analysis
**
**
**
**   Units
**
**   Geometry (mesh data)        --> mm
**   Materials (Young's modulus) --> N/mm2 = MPa
**   Loads (nodal loads)         --> N
**
